$PROBLEM 1 Compartment - Linear elimination - Proportional residual error

$INPUT ID TIME DV AMT EVID CMT

$DATA Estimation_dataset.csv IGNORE=I

$SUB ADVAN13 TOL=9

$MODEL
COMP=(DEPOT)
COMP=(CENTRAL)

$PK
ka = THETA(1)*EXP(ETA(1))

V1 = THETA(2)*EXP(ETA(2))

CL = THETA(3)*EXP(ETA(3))

k10 = CL/V1

S2 = V1

$DES
DADT(1)= -ka*A(1)

DADT(2)= ka*A(1) - k10*A(2)


$ERROR
IPRE = 0.00001
IF(F.GT.0) IPRE = F
Y = IPRE * (1 + EPS(1)) + EPS(2)

$THETA
(0,1) ; Absorption rate constant
(0,1) ; Volume of distribution - central compartment
(0,1) ; Clearance


$OMEGA
0 FIX
0.1
0.1


$SIGMA
0.1 ; Proportional
0 FIX ; Additive

$EST PRINT=5 MAX=9999 METHOD=1 NSIG=3 SIGL=6 INTERACTION POSTHOC NOABORT MSFO=mfi
$COV PRINT=E

$TABLE ID TIME DV CMT IPRE CPREDI CRESI CWRESI NOPRINT ONEHEADER FILE = SDTABModel001
$TABLE ID ETAS(1:LAST) NOPRINT ONEHEADER FIRSTONLY FILE = PATABModel001
